// SBML level 3 version 1

model model()
  // hasTaxon taxonomy:158879
  // isDescribedBy pubmed:15752426
  // model units - time: second, extent: mole

  // Compartments:
  compartment comp = 1e-14 litre;

  // Species:
  species E in comp = 5e-21/comp;  // substance in mole
  species S in comp = 1e-20/comp;  // substance in mole
  species P in comp = 0;  // substance in mole
  species ES in comp = 0;  // substance in mole

  // Reactions:
  veq: E + S -> ES; comp*(kon*E*S - koff*ES);  // bigg.reaction:HXAND META:RXN-7682 ec-code:1.17.1.4 kegg.reaction:R01768
    kon = 1000000 litre_per_mole_second; koff = 0.2 per_second;
  vcat: ES => E + P; comp*kcat*ES;
    kcat = 0.1 per_second;

  // Unit definitions:
  unit per_second = 1 / second;
  unit litre_per_mole_second = litre / (mole * second);
end
